// SBML level 2 version 4

model COVID_19_SEIR_CT()
  // COVID-19 SEIR CT
  // COVID-19 SEIR model for Connecticut
  // This model is a basic SEIR model that will be adjusted for the epidemiological parameters derived from Connecticut's data.
  // The model can be run in the traditional mode, by using and solving ODEs, or in a stochastic mode, by using the Gillespie stochastic simulation algorithm.
  // This is based on the model published by Alison Hill with code on GitHub
  // This model is published under the CC-BY-SA 4.0 International license

  // Compartments:
  compartment compartment = 1;

  // Species:
  species E in compartment = 0;
  species I1 in compartment = 1;
  species S in compartment = 3572664;
  species I2 in compartment = 0;
  species I3 in compartment = 0;
  species D in compartment = 0;
  species R in compartment = 0;

  // Parameters:
  alpha = 0.2;
  gamma1 = 0.133;
  gamma2 = 0.188;
  gamma3 = 0.06;
  p1 = 0.033;
  p2 = 0.062;
  miu = 0.04;
  N = S*compartment + E*compartment + I2*compartment + I3*compartment + I1*compartment + R*compartment + D*compartment;
  beta1_base = 0.33;
  beta2_base = 0;
  beta3_base = 0;
  Initial_for_N = N;
  Initial_for_beta1_base = beta1_base;
  Initial_for_beta2_base = beta2_base;
  Initial_for_beta3_base = beta3_base;

  // Assignment rules:
  beta1 := Initial_for_beta1_base/Initial_for_N;
  beta2 := Initial_for_beta2_base/Initial_for_N;
  beta3 := Initial_for_beta3_base/Initial_for_N;
  Itot := I1*compartment + I3*compartment + I2*compartment;
  Hosp := I3*compartment + I2*compartment;

  // Reactions:
  Infection1: S + I1 => E + I1; compartment*beta1*S*I1;
  Infection2: S + I2 => E + I2; compartment*beta2*S*I2;
  Infection3: S + I3 => E + I3; compartment*beta3*S*I3;
  Onset: E => I1; compartment*alpha*E;
  Progression1: I1 => I2; compartment*p1*I1;
  Progression2: I2 => I3; compartment*p2*I2;
  Death: I3 => D; compartment*miu*I3;
  Recovery1: I1 => R; compartment*gamma1*I1;
  Recovery2: I2 => R; compartment*gamma2*I2;
  Recovery3: I3 => R; compartment*gamma3*I3;

  // Unit definitions:
  unit time = 86400 second;
  unit substance = item;
end
