// SBML level 3 version 2

model lourenco()
  // Deterministic version of 'Fundamental principles of epidemic spread highlight the immediate need for large-scale serological surveys to assess the stage of the SARS-CoV-2 epidemic' by Lourenco et al.
  // For software portability, the term z_delay(t) = z(t - psi) is approximated by d z_delay / dt = (z - z_delay) / psi, which is correct to first order.
  // We assume one infection at time t = 0.
  // model units - substance: dimensionless, time: day, volume: dimensionless, area: dimensionless, length: dimensionless, extent: dimensionless

  // Compartments:
  compartment compartment = 1 dimensionless;

  // Species:
  species S in compartment = 1;
  species I in compartment = 1.495439e-8;
  species R in compartment = 0;

  // Parameters:
  y has dimensionless;
  z has dimensionless;
  Delta = 0 item;
  R0 = 2.25 dimensionless;
  sigma_inv = 4.5 day;
  sigma = 1/sigma_inv; sigma has per_day;
  beta = sigma*R0; beta has per_day;
  psi = 17 day;
  theta = 0.14 per_day;
  rho = 0.01 dimensionless;
  N = 66870000 item;
  z_delay = 1.495439e-8 dimensionless;

  // Assignment rules:
  y := I;
  z := I + R;

  // Rate rules:
  Delta' = N*rho*theta*z_delay;
  z_delay' = (z - z_delay)/psi;

  // Reactions:
  S_to_I: S => I; beta*S*I;
  I_to_R: I => R; sigma*I;

  // Unit definitions:
  unit day = 86400 second;
  unit per_day = 1 / (86400 second);
end
