// SBML level 2 version 4
// dcterms:bibliographicCitation: Giordano et al 2020 A SIDARTHE Model of COVID-19 Epidemic in Italy urn:miriam:arxiv:2003.09861v1

model SIDARTHE()
  // SIDARTHE model of COVID-19 epidemic
  // This model is an implementation of the model described in a preprint by Giordano et al. arXiv:2003.09861v1
  // This model replicates exactly the results of Fig 3A-D of the paper. Note that in the paper they consider the inital time as day 1, where this model treats it as day 0, so the time axis is shifted by one day.
  // isDescribedBy arxiv:2003.09861v1

  // Compartments:
  compartment compartment = 1;

  // Species:
  species I in compartment = 3.333333e-6;
  species S in compartment = 1 - I - D - A - R - T - H - E;
  species D in compartment = 3.333333e-7;
  species A in compartment = 1.666667e-8;
  species R in compartment = 3.333333e-8;
  species T in compartment = 0;
  species E in compartment = 0;
  species H in compartment = 0;

  // Parameters:
  alpha = 0.57;
  beta = 0.011;
  gamma = 0.456;
  delta = 0.011;
  epsilon = 0.171;
  zeta = 0.125;
  eta = 0.125;
  theta = 0.371;
  kappa = 0.017;
  lambda = 0.034;
  mu = 0.012;
  nu = 0.027;
  xi = 0.017;
  rho = 0.034;
  sigma = 0.017;
  tau = 0.003;
  Recovered = 0;
  var Diagn_cumul_infected;
  var Perceived_CFR;
  Initial_for_A = A;
  Initial_for_I = I;
  Initial_for_S = S;

  // Assignment rules:
  CFR := E/(Initial_for_S - S);
  r4 := nu + xi;
  r1 := epsilon + zeta + lambda;
  r2 := eta + rho;
  r3 := theta + mu + kappa;
  R0 := alpha/r1 + beta*epsilon/(r1*r2) + gamma*zeta/(r1*r3) + delta*eta*epsilon/(r1*r2*r4) + delta*zeta*theta/(r1*r3*r4);
  Perceived_CFR := E/((epsilon*r3 + zeta*(theta + mu))/(r1*r3)*(Initial_for_I + Initial_for_S - I - S) + (theta + mu)/r3*(Initial_for_A - A));
  DRT := D + R + T;
  Diagn_cumul_infected := DRT + Recovered + E;
  IDARTHE := I + D + A + R + T + H + E;
  IDART := I + D + A + R + T;
  r5 := sigma + tau;

  // Rate rules:
  Recovered' = rho*D + xi*R + sigma*T;

  // Reactions:
  contagion_I: S + I => 2 I; compartment*alpha*S*I;
  contagion_D: S + D => I + D; compartment*beta*S*D;
  contagion_A: S + A => I + A; compartment*gamma*S*A;
  contagion_R: S + R => I + R; compartment*delta*S*R;
  diagnosis_I: I => D; compartment*epsilon*I;
  symptoms_I: I => A; compartment*zeta*I;
  symptoms_D: D => R; compartment*nu*D;
  diagnosis_A: A => R; compartment*theta*A;
  critical_A: A => T; compartment*mu*A;
  critical_R: R => T; compartment*nu*R;
  death: T => E; compartment*tau*T;
  healing_I: I => H; compartment*lambda*I;
  healing_D: D => H; compartment*rho*D;
  healing_A: A => H; compartment*kappa*A;
  healing_R: R => H; compartment*xi*R;
  healing_T: T => H; compartment*sigma*T;

  // Events:
  Day_4_measures: at (time > 4): alpha = 0.422, gamma = 0.285, beta = 0.0057, delta = 0.0057;
  Day_12_screening: at (time > 12): epsilon = 0.143;

  // Unit definitions:
  unit volume = 1e-3 litre;
  unit time = 86400 second;
  unit substance = 1e-3 mole;
end
