// SBML level 2 version 4
// dcterms:bibliographicCitation: Giordano et al 2020 A SIDARTHE Model of COVID-19 Epidemic in Italy urn:miriam:arxiv:2003.09861v1

model SIDARTHE_pop()
  // SIDARTHE model of COVID-19 epidemic
  // This model is based on the model described in a preprint by Giordano et al. arXiv:2003.09861v1
  // This model is very similar to the original, except that it now uses absolute numbers for the population, rather than proportions as in the original. More precisely, the summation of all variables is now to 60 million, rather than 1. Note that the constants for the infection reactions, alpha, beta, gamma, and delta, have to be divided by the total population too. Additionally the model is enhanced with a set of factors that are used to adjust all parameters to a scale factor (as communicated by the first author of the paper). These modifications allow the model to be simulated stochastically using the Gillespie algorithm.
  // When running this model stochastically (using Direct Method or others) COPASI warns of a problem with an ODE in the model. Simply press "Ignore' to run the simulation anyway. This implies that the variables 'Recovered' and 'Diagn cumul infected' will not be calculated when running this model stochastically. This is because 'Recovered' is encoded as a direct ODE (calculates the number of recovered that had been diagnosed, ie the part of H that came from diagnosed people) and cannot be calculated in the stochastic mode. 'Diagn cumul infected' is the total diagnosed at all times and its calculation required 'Recovered', thus cannot also be calculated.
  // isDescribedBy arxiv:2003.09861v1

  // Compartments:
  compartment compartment = 1;

  // Species:
  species I in compartment = 200;
  species S in compartment = Population - I - D - A - R - T - E;
  species D in compartment = 20;
  species A in compartment = 1;
  species R in compartment = 2;
  species T in compartment = 0;
  species E in compartment = 0;
  species H in compartment = 0;

  // Parameters:
  alpha = scale;
  beta = scale*0.011;
  gamma = scale*0.8;
  delta = scale*0.011;
  epsilon = scale*0.3;
  zeta = scale*0.22;
  eta = scale*0.22;
  theta = scale*0.65;
  kappa = scale*0.03;
  lambda = scale*0.06;
  mu = scale*0.03;
  nu = scale*0.048;
  xi = scale*0.03;
  rho = scale*0.06;
  sigma = scale*0.03;
  tau = 0.003;
  Recovered = 0;
  var Diagn_cumul_infected;
  var Perceived_CFR;
  Population = 60000000 unit_0;
  scale = 0.57;
  Metabolite_4_0 = A; Metabolite_4_0 is "Initial for A";
  Metabolite_7_0 = I; Metabolite_7_0 is "Initial for I";
  Metabolite_6_0 = S; Metabolite_6_0 is "Initial for S";
  ModelValue_8_0 = Population; ModelValue_8_0 is "Initial for Population";
  ModelValue_4_0 = scale; ModelValue_4_0 is "Initial for scale";

  // Assignment rules:
  r2 := eta + rho;
  beta_pop := beta/ModelValue_8_0;
  r1 := epsilon + zeta + lambda;
  r3 := theta + mu + kappa;
  CFR := E/(Metabolite_6_0 - S);
  IDARTHE := I + D + A + R + T + H + E;
  r5 := sigma + tau;
  Perceived_CFR := E/((epsilon*r3 + zeta*(theta + mu))/(r1*r3)*(Metabolite_7_0 + Metabolite_6_0 - I - S) + (theta + mu)/r3*(Metabolite_4_0 - A));
  DRT := D + R + T;
  r4 := nu + xi;
  R0 := alpha/r1 + beta*epsilon/(r1*r2) + gamma*zeta/(r1*r3) + delta*eta*epsilon/(r1*r2*r4) + delta*zeta*theta/(r1*r3*r4);
  delta_pop := delta/ModelValue_8_0;
  Diagn_cumul_infected := DRT + Recovered + E;
  alpha_pop := alpha/ModelValue_8_0;
  gamma_pop := gamma/ModelValue_8_0;
  IDART := I + D + A + R + T;

  // Rate rules:
  Recovered' = rho*D + xi*R + sigma*T;

  // Reactions:
  contagion_I: S + I => 2 I; compartment*alpha_pop*S*I;
  contagion_D: S + D => I + D; compartment*beta_pop*S*D;
  contagion_A: S + A => I + A; compartment*gamma_pop*S*A;
  contagion_R: S + R => I + R; compartment*delta_pop*S*R;
  diagnosis_I: I => D; compartment*epsilon*I;
  symptoms_I: I => A; compartment*zeta*I;
  symptoms_D: D => R; compartment*nu*D;
  diagnosis_A: A => R; compartment*theta*A;
  critical_A: A => T; compartment*mu*A;
  critical_R: R => T; compartment*nu*R;
  death: T => E; compartment*tau*T;
  healing_I: I => H; compartment*lambda*I;
  healing_D: D => H; compartment*rho*D;
  healing_A: A => H; compartment*kappa*A;
  healing_R: R => H; compartment*xi*R;
  healing_T: T => H; compartment*sigma*T;

  // Events:
  Day_4_measures: at (time > 4): alpha = ModelValue_4_0*0.74, beta = ModelValue_4_0*0.01, gamma = ModelValue_4_0*0.5, delta = ModelValue_4_0*0.01;
  Day_12_screening: at (time > 12): epsilon = ModelValue_4_0*0.25;

  // Unit definitions:
  unit volume = 1e-3 litre;
  unit time = 86400 second;
  unit substance = item;
  unit unit_0 = item; unit_0 is "#";
end
